y(x) := 0.1*x^2 - x*ln(x)
i := 0 .. 10
z(i) := 1 + i
F(i) := y(z(i))
# [plot: y(x) vs x]
i = [0; 1; 2; 3; 4; 5; 6; 7; 8; 9; 10]
z(i) = [1; 2; 3; 4; 5; 6; 7; 8; 9; 10; 11]
F(i) = [0.1; -0.986294; -2.39584; -3.94518; -5.54719; -7.15056; -8.72137; -10.2355; -11.675; -13.0259; -14.2768]
