x := 0.01, 0.1 .. 2
f(x) := 0.1*x^2 - x*ln(x)
x = [0.01; 0.1; 0.19; 0.28; 0.37; 0.46; 0.55; 0.64; 0.73; 0.82; 0.91; 1; 1.09; 1.18; 1.27; 1.36; 1.45; 1.54; 1.63; 1.72; 1.81; 1.9; 1.99]
f(x) = [0.0460617; 0.231259; 0.319149; 0.36427; 0.381563; 0.378363; 0.35906; 0.326584; 0.283029; 0.22997; 0.168633; 0.1; 0.0248763; -0.056067; -0.142261; -0.233219; -0.328517; -0.427785; -0.530695; -0.636958; -0.746312; -0.858522; -0.973378]
