y(x) := 0.1*x^2 - x*ln(x)
x := 1.1, 1.103 .. 1.2
x = [
    1.1; 1.103; 1.106; 1.109; 1.112; 1.115; 1.118; 1.121; 1.124; 1.127
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]
y(x) = [
    0.0161588; 0.0135297; 0.0108942; 0.00825239; 0.00560426; 0.00294984; 0.000289143; -0.0023778; -0.00505098; -0.00773036
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]
