x := 1
f(x) := 0.1*x^2 - x*ln(x)
a := 1.1
Chord(f, f2, a, b, ε) :=
    n ← 0
    if f(a)*f2(a) > 0
        formula ← 1
        x_0 ← b
    else
        formula ← 2
        x_0 ← a
    while 1
        if formula == 1
            x_1 ← a - f(a)*(x_0 - a)/(f(x_0) - f(a))
        else
            x_1 ← x_0 - f(x_0)*(b - x_0)/(f(b) - f(x_0))
        if |x_1 - x_0| < ε
            break
        x_0 ← x_1
        n ← n + 1
        if n > 10000
            break
    (x_1 + x_0)/2
b := 2
f2(x) := d^2/dx^2(f(x))
z := Chord(f, f2, a, b, 10^-5)
z = 1.11832
