f(x) := 0.1*x^2 - x*ln(x)
a := 1.1
b := 2
D(f, a, b, ε) :=
    if f(a)*f(b) > 0
        return ∞
    while |b - a| > ε
        c ← (a + b)/2
        if f(a)*f(c) > 0
            a ← c
        b ← c
    (a + b)/2
f(a) = 0.0161588
f(b) = -0.986294
x := D(f, a, b, 10^-5)
x = 1.11406
f(x) = 0.00378002
# [plot: f(x) vs x]
