a := 1.1
b := 2
f(x) := 0.1*x^2 - x*ln(x)
f1(x) := d/dx(f(x))
f1(1) = -0.8
SI(φ, x_0, ε) :=
    n ← 0
    while 1
        x_1 ← φ(x_0)
        if |x_1 - x_0| < ε
            break
        x_0 ← x_1
        n ← n + 1
        if n > 10000
            break
    (x_1 + x_0)/2
d^2/dz^2(0.1*z^2 - z*ln(z)) → -1.0*1.0/z + 0.2
M := max(f1(a), f1(b), f1(1))
m := min(f1(a), f1(b), f1(1))
c := 2/(M + m)
c = -0.955499
φ(x) := x - c*f(x)
x_0 := a
x := SI(φ, x_0, 10^-5)
x = 1.11832
f(x) = 5.15444e-6
