# Worksheet setting: ORIGIN = 1
# Задание 1. Решить систему линейных уравнений методом Гаусса. Варианты заданий приведены в таблице 2.
Gauss(a, b, n) :=
    for i ∈ 1 .. n
        for j ∈ 1 .. n
            a0[i, j] ← a[i, j]
        b0[i] ← b[i]
    for k ∈ 1 .. n - 1
        if a[k, k] == 0
            m ← k + 1
            while m ≤ n and a[m, k] == 0
                m ← m + 1
            if m > n
                return "система не обусловлена "
            for j ∈ 1 .. n
                R ← a[m, j]
                a[m, j] ← a[k, j]
                a[k, j] ← R
            R ← b[m]
            b[m] ← b[k]
            b[k] ← R
        for i ∈ k + 1 .. n
            q ← a[i, k]/a[k, k]
            for j ∈ k .. n
                a[i, j] ← a[i, j] - q*a[k, j]
            b[i] ← b[i] - q*b[k]
    x[n] ← b[n]/a[n, n]
    for i ∈ n - 1, n - 2 .. 1
        s ← 0
        for j ∈ i + 1 .. n
            s ← s + a[i, j]*x[j]
        x[i] ← (b[i] - s)/a[i, i]
    for i ∈ 1 .. n
        s ← 0
        for j ∈ 1 .. n
            s ← s + a0[i, j]*x[j]
        δ[i] ← b0[i] - s
    [x; a; δ]
A := [6.36, 1.75, 1.0; 7.42, -19.03, 1.75; 1.77, 0.42, 6.36]
b := [41.70; 49.49; 27.67]
C := [6.36, 1.75, 1.0, 41.70; 7.42, -19.03, 1.75, 49.49; 1.77, 0.42, 6.36, 27.67]
rank(A) = 3
# Поскольку ранги матриц равны соответственно по теореме Кронекера - Копелли существует решение
rank(C) = 3
|A| = -814.795  # т.к. матрица невырожденная, то следовательно существует единственное решение
Gauss(A, b, 3)[3] = [0; 7.10543e-15; 0]  # Это погрешности
Gauss(A, b, 3)[2] = [6.36, 1.75, 1; 0, -21.0717, 0.583333; 0, 0, 6.07984]  # Это коэффициенты
Gauss(A, b, 3)[1] = [6.13206; 0.0332717; 2.64187]  # Это корни решения
Gauss(A, b, 3) = [
    [6.13206; 0.0332717; 2.64187]; [6.36, 1.75, 1; 0, -21.0717, 0.583333; 0, 0, 6.07984]; [0; 7.10543e-15; 0]
]
# Для самопроверки
rref(augment(A, b)) → [1.0, 0.0, 0.0, 6.1320608397; 0.0, 1.0, 0.0, 0.0332716661627; 0.0, 0.0, 1.0, 2.6418676437]
