# Worksheet setting: ORIGIN = 1
# Задание 2. Решить систему линейных уравнений методом простой итерации.
ε := 0.0001
MPI(a, b, n, ε, kmax) :=
    k ← 0
    for i ∈ 1 .. n
        x[i] ← 0
    δ ← 2*ε
    while δ > ε and k ≤ kmax
        m ← -100
        k ← k + 1
        for i ∈ 1 .. n
            x0[i] ← x[i]
        M[k, 1] ← k
        for i ∈ 1 .. n
            S ← 0
            for j ∈ 1 .. n
                if (j == i)
                    continue
                S ← S + a[i, j]*x0[j]
            x[i] ← 1/a[i, i]*(b[i] - S)
            if |x[i] - x0[i]| > m
                m ← |x[i] - x0[i]|
            M[k, i + 1] ← x[i]
        δ ← m
        M[k, n + 2] ← δ
    M
A := [6.36, 1.75, 1.0; 7.42, -19.03, 1.75; 1.77, 0.42, 6.36]
b := [41.70; 49.49; 27.67]
C := [6.36, 1.75, 1.0, 41.70; 7.42, -19.03, 1.75, 49.49; 1.77, 0.42, 6.36, 27.67]
rank(A) = 3
# Поскольку ранги матриц равны соответственно по теореме Кронекера - Копелли существует решение
rank(C) = 3
|A| = -814.795  # т.к. матрица невырожденная, то следовательно существует единственное решение
MPI(A, b, 3, ε, 100) = [
    1, 6.5566, -2.60063, 4.35063, 6.5566;
    2, 6.58812, 0.355943, 2.69765, 2.95657;
    3, 6.0345, 0.216226, 2.49364, 0.553621;
    4, 6.10503, -0.0183982, 2.65694, 0.234624;
    5, 6.14391, 0.0241164, 2.6528, 0.0425146;
    6, 6.13286, 0.038897, 2.63917, 0.0147806;
    7, 6.13094, 0.0333358, 2.64127, 0.00556119;
    8, 6.13214, 0.0327786, 2.64218, 0.00120021;
    9, 6.13215, 0.0333296, 2.64188, 0.000550992;
    10, 6.13204, 0.0333067, 2.64184, 0.000104876;
    11, 6.13206, 0.0332622, 2.64187, 4.453e-5
]
# Для самопроверки
rref(augment(A, b)) → [1.0, 0.0, 0.0, 6.1320608397; 0.0, 1.0, 0.0, 0.0332716661627; 0.0, 0.0, 1.0, 2.6418676437]
