# Worksheet setting: ORIGIN = 1
# Задание 3. Решить систему уравнений методом Зейделя.
zeid(a, b, n, ε, kmax) :=
    k ← 0
    δ ← 2*ε
    for i ∈ 1 .. n
        x[i] ← 0
    while δ > ε and k < kmax
        for i ∈ 1 .. n
            x0 ← x
        k ← k + 1
        for i ∈ 1 .. n
            s ← 0
            for j ∈ 1 .. n
                if j ≠ i
                    s ← s + a[i, j]*x[j]
            x[i] ← 1/a[i, i]*(b[i] - s)
        δ ← |x - x0|
        M[k, 1] ← k
        for i ∈ 1 .. n
            M[k, i + 1] ← x[i]
        M[k, 5] ← δ
    M
A := [6.36, 1.75, 1.0; 7.42, -19.03, 1.75; 1.77, 0.42, 6.36]
b := [41.70; 49.49; 27.67]
C := [6.36, 1.75, 1.0, 41.70; 7.42, -19.03, 1.75, 49.49; 1.77, 0.42, 6.36, 27.67]
rank(A) = 3
# Поскольку ранги матриц равны соответственно по теореме Кронекера - Копелли существует решение
rank(C) = 3
|A| = -814.795  # т.к. матрица невырожденная, то следовательно существует единственное решение
# Для самопроверки
rref(augment(A, b)) → [1.0, 0.0, 0.0, 6.1320608397; 0.0, 1.0, 0.0, 0.0332716661627; 0.0, 0.0, 1.0, 2.6418676437]
zeid(A, b, 3, 0.0001, 100) = [
    1, 6.5566, -0.0441408, 2.52883, 7.02752;
    2, 6.17113, 0.038112, 2.63067, 0.407092;
    3, 6.13249, 0.0324092, 2.64181, 0.0406194;
    4, 6.13231, 0.0333623, 2.64179, 0.000970196;
    5, 6.13205, 0.0332597, 2.64187, 0.000290773;
    6, 6.13206, 0.0332731, 2.64187, 2.13939e-5
]
