# Задание 4. Символьное решение систем уравнений
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A := [6.36, 1.75, 1.0; 7.42, -19.03, 1.75; 1.77, 0.42, 6.36]
b := [41.70; 49.49; 27.67]
C := [6.36, 1.75, 1.0, 41.70; 7.42, -19.03, 1.75, 49.49; 1.77, 0.42, 6.36, 27.67]
solve block
    # constraints
    6.36*x + 1.75*y + 1.0*z == 41.70
    7.42*x - 19.03*y + 1.75*z == 49.49
    1.77*x + 0.42*y + 6.36*z == 27.67
    # solver
    Find(x, y, z) → [6.1320608397; 0.0332716661627; 2.6418676437]
end solve block
rank(A) = 3
# Поскольку ранги матриц равны соответственно по теореме Кронекера - Копелли существует решение
rank(C) = 3
|A| = -814.795  # т.к. матрица невырожденная, то следовательно существует единственное решение
# Для самопроверки
rref(augment(A, b)) → [1.0, 0.0, 0.0, 6.1320608397; 0.0, 1.0, 0.0, 0.0332716661627; 0.0, 0.0, 1.0, 2.6418676437]
