# Задание 5. Решение системы линейных алгебраических уравнений как матричное уравнение  .
A := [6.36, 1.75, 1.0; 7.42, -19.03, 1.75; 1.77, 0.42, 6.36]
b := [41.70; 49.49; 27.67]
C := [6.36, 1.75, 1.0, 41.70; 7.42, -19.03, 1.75, 49.49; 1.77, 0.42, 6.36, 27.67]
rank(A) = 3
# Поскольку ранги матриц равны соответственно по теореме Кронекера - Копелли существует решение
rank(C) = 3
|A| = -814.795  # т.к. матрица невырожденная, то следовательно существует единственное решение
# Для самопроверки
rref(augment(A, b)) → [1.0, 0.0, 0.0, 6.1320608397; 0.0, 1.0, 0.0, 0.0332716661627; 0.0, 0.0, 1.0, 2.6418676437]
A^-1*b = [6.13206; 0.0332717; 2.64187]
lsolve(A, b) = [6.13206; 0.0332717; 2.64187]
