# Worksheet setting: ORIGIN = 1
# Задание 7. Решение системы методом Крамера.
A1 := [41.70, 1.75, 1.0; 49.49, -19.03, 1.75; 27.67, 0.42, 6.36]
A2 := [6.36, 41.70, 1.0; 7.42, 49.49, 1.75; 1.77, 27.67, 6.36]
A3 := [6.36, 1.75, 41.70; 7.42, -19.03, 49.49; 1.77, 0.42, 27.67]
A := [6.36, 1.75, 1.0; 7.42, -19.03, 1.75; 1.77, 0.42, 6.36]
b := [41.70; 49.49; 27.67]
C := [6.36, 1.75, 1.0, 41.70; 7.42, -19.03, 1.75, 49.49; 1.77, 0.42, 6.36, 27.67]
D := |A|
D1 := |A1|
D2 := |A2|
D3 := |A3|
rank(A) = 3
D → -814.794963
D1 → -4996.372285
D2 → -27.109586
D3 → -2152.580449
# Поскольку ранги матриц равны соответственно по теореме Кронекера - Копелли существует решение
rank(C) = 3
x1 := D1/D
x2 := D2/D
x3 := D3/D
|A| = -814.795  # т.к. матрица невырожденная, то следовательно существует единственное решение
x1 → 6.1320608397
x2 → 0.0332716661627
x3 → 2.6418676437
# Для самопроверки
rref(augment(A, b)) → [1.0, 0.0, 0.0, 6.1320608397; 0.0, 1.0, 0.0, 0.0332716661627; 0.0, 0.0, 1.0, 2.6418676437]
