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# Задание 2. Вычислить одно значение заданной функции для промежуточного значения аргумента a с помощью интерполяционного многочлена Лагранжа и оценить погрешность интерполяции.
n := 6
i := 0 .. n
x := [-3.2; -0.8; 0.4; 2.8; 4.0; 6.4; 7.6]
y := [-1.94; -0.61; 0.31; 1.81; 2.09; 1.47; 0.68]
Ln(t) := sum(y[k]*product(if(k == j, 1, (t - x[j])/(x[k] - x[j])), j = 0 .. n), k = 0 .. n)
t := -3.2, -3.0 .. 10
f(x) := 2.1*sin(0.37*x)
a := -1.55
R(x) := max(|f(x)^(n + 1)|)/(n + 1)!*|product(x - x[q], q = 0 .. n)|
R(x) = 1801075
Ln(a) = -1.12955
# [plot: y, Ln(t) vs x, t]
